# OpenSim document version 40000
ScaleTool 2nd_Hand_Model_Mass-scaled:
  mass: 0 [kg]
  height: -1
  age: -1
  ModelScaler:
    apply: true
    scaling_order: measurements
    marker_file: mediapipe_hand.trc
    time_range: 0 26.16
    preserve_mass_distribution: true
    MeasurementSet:
      Measurement right_arm: apply=true
        MarkerPair: markers=(right_elbow right_shoulder)
        BodyScale humerus: axes=(X Y Z)
      Measurement right_forearm: apply=true
        MarkerPair: markers=(right_elbow right_wrist)
        BodyScale ulna: axes=(X Y Z)
        BodyScale radius: axes=(X Y Z)
      Measurement right_proximal_thumb: apply=true
        MarkerPair: markers=(right_hand_thumb_mcp right_hand_thumb_ip)
        BodyScale proximal_thumb: axes=(X Y Z)
      Measurement right_distal_thumb: apply=true
        MarkerPair: markers=(right_hand_thumb_ip right_hand_thumb_tip)
        BodyScale distal_thumb: axes=(X Y Z)
      Measurement right_proxph2: apply=true
        MarkerPair: markers=(right_hand_index_finger_mcp right_hand_index_finger_pip)
        BodyScale proxph2: axes=(X Y Z)
      Measurement right_midph2: apply=true
        MarkerPair: markers=(right_hand_index_finger_pip right_hand_index_finger_dip)
        BodyScale midph2: axes=(X Y Z)
        BodyScale distph2: axes=(X Y Z)
      Measurement right_proxph3: apply=true
        MarkerPair: markers=(right_hand_middle_finger_mcp right_hand_middle_finger_pip)
        BodyScale proxph3: axes=(X Y Z)
      Measurement right_midph3: apply=true
        MarkerPair: markers=(right_hand_middle_finger_pip right_hand_middle_finger_dip)
        BodyScale lunate: axes=(X Y Z)
        BodyScale scaphoid: axes=(X Y Z)
        BodyScale pisiform: axes=(X Y Z)
        BodyScale triquetrum: axes=(X Y Z)
        BodyScale capitate: axes=(X Y Z)
        BodyScale trapezium: axes=(X Y Z)
        BodyScale trapezoid: axes=(X Y Z)
        BodyScale hamate: axes=(X Y Z)
        BodyScale firstmc1: axes=(X Y Z)
        BodyScale firstmc: axes=(X Y Z)
        BodyScale secondmc: axes=(X Y Z)
        BodyScale thirdmc: axes=(X Y Z)
        BodyScale fourthmc: axes=(X Y Z)
        BodyScale fifthmc: axes=(X Y Z)
        BodyScale midph3: axes=(X Y Z)
        BodyScale distph3: axes=(X Y Z)
      Measurement right_proxph4: apply=true
        MarkerPair: markers=(right_hand_ring_finger_mcp right_hand_ring_finger_pip)
        BodyScale proxph4: axes=(X Y Z)
      Measurement right_midph4: apply=true
        MarkerPair: markers=(right_hand_ring_finger_pip right_hand_ring_finger_dip)
        BodyScale midph4: axes=(X Y Z)
        BodyScale distph4: axes=(X Y Z)
      Measurement right_proxph5: apply=true
        MarkerPair: markers=(right_hand_pinky_finger_mcp right_hand_pinky_finger_pip)
        BodyScale proxph5: axes=(X Y Z)
      Measurement right_midph5: apply=true
        MarkerPair: markers=(right_hand_pinky_finger_pip right_hand_pinky_finger_dip)
        BodyScale midph5: axes=(X Y Z)
        BodyScale distph5: axes=(X Y Z)
  MarkerPlacer:
    apply: true
    marker_file: mediapipe_hand.trc
    time_range: 0 26.16
    max_marker_movement: -1
    IKTaskSet:
      IKMarkerTask right_shoulder: apply=true weight=1
      IKMarkerTask right_elbow: apply=true weight=1
      IKMarkerTask right_wrist: apply=true weight=1
      IKMarkerTask right_hand_thumb_cmc: apply=true weight=1
      IKMarkerTask right_hand_thumb_mcp: apply=true weight=1
      IKMarkerTask right_hand_thumb_ip: apply=true weight=1
      IKMarkerTask right_hand_thumb_tip: apply=true weight=1
      IKMarkerTask right_hand_index_finger_mcp: apply=true weight=1
      IKMarkerTask right_hand_index_finger_pip: apply=true weight=1
      IKMarkerTask right_hand_index_finger_dip: apply=true weight=1
      IKMarkerTask right_hand_index_finger_tip: apply=true weight=1
      IKMarkerTask right_hand_middle_finger_mcp: apply=true weight=1
      IKMarkerTask right_hand_middle_finger_pip: apply=true weight=1
      IKMarkerTask right_hand_middle_finger_dip: apply=true weight=1
      IKMarkerTask right_hand_middle_finger_tip: apply=true weight=1
      IKMarkerTask right_hand_ring_finger_mcp: apply=true weight=1
      IKMarkerTask right_hand_ring_finger_pip: apply=true weight=1
      IKMarkerTask right_hand_ring_finger_dip: apply=true weight=1
      IKMarkerTask right_hand_ring_finger_tip: apply=true weight=1
      IKMarkerTask right_hand_pinky_finger_mcp: apply=true weight=1
      IKMarkerTask right_hand_pinky_finger_pip: apply=true weight=1
      IKMarkerTask right_hand_pinky_finger_dip: apply=true weight=1
      IKMarkerTask right_hand_pinky_finger_tip: apply=true weight=1
