# OpenSim document version 20302
InverseKinemtaticsTool arm26:
  results_directory: ./
  model_file: arm26.osim
  constraint_weight: infinity
  accuracy: 0.00001
  marker_file: arm26_elbow_flex.trc
  time_range: 0 1
  report_errors: true
  output_motion_file: arm26_InverseKinematics.mot
  report_marker_locations: false
  IKTaskSet arm26_InverseKinematics:
    IKMarkerTask r_acromion: apply=true weight=1
    IKMarkerTask r_humerus_epicondyle: apply=true weight=1
    IKMarkerTask r_radius_styloid: apply=true weight=1
