# OpenSim document version 40000
InverseKinematicsTool:
  time_range: 0 8.2
  marker_file: ../output/dao_yin_dropped_working.trc
  IKTaskSet:
    IKMarkerTask nose: apply=true weight=1
    IKMarkerTask right_eye: apply=true weight=5
    IKMarkerTask left_eye: apply=true weight=5
    IKMarkerTask right_shoulder: apply=true weight=5
    IKMarkerTask left_shoulder: apply=true weight=5
    IKMarkerTask left_elbow: apply=true weight=1
    IKMarkerTask right_elbow: apply=true weight=1
    IKMarkerTask left_wrist: apply=true weight=2
    IKMarkerTask right_wrist: apply=true weight=2
    IKMarkerTask right_hip: apply=true weight=5
    IKMarkerTask left_hip: apply=true weight=5
    IKMarkerTask right_knee: apply=true weight=2
    IKMarkerTask left_knee: apply=true weight=2
    IKMarkerTask right_ankle: apply=true weight=1
    IKMarkerTask right_heel: apply=true weight=0.01
    IKMarkerTask right_foot_index: apply=true weight=1
    IKMarkerTask left_ankle: apply=true weight=1
    IKMarkerTask left_heel: apply=true weight=0.01
    IKMarkerTask left_foot_index: apply=true weight=1
