# OpenSim document version 40000
ScaleTool mediapipe_pose-scaled:
  mass: 83.9782 [kg]
  height: -1
  age: -1
  GenericModelMaker:
    model_file: C:\Users\Mac Prible\repos\FMC_projects\tests\reference\test_add_ModelLandmarkMap_reference.osim
  ModelScaler:
    apply: true
    scaling_order: measurements
    marker_file: C:\Users\Mac Prible\repos\FMC_projects\tests\input\trc\dao_yin.trc
    time_range: 0 8.2
    preserve_mass_distribution: true
    output_model_file: c:\Users\Mac Prible\repos\FMC_projects\tests\output\test_scale_model_output.osim
    MeasurementSet:
      Measurement torso: apply=true
        MarkerPair: markers=(left_shoulder left_hip)
        MarkerPair: markers=(right_shoulder right_hip)
        BodyScale lumbar5: axes=(X Y Z)
        BodyScale lumbar4: axes=(X Y Z)
        BodyScale lumbar3: axes=(X Y Z)
        BodyScale lumbar2: axes=(X Y Z)
        BodyScale lumbar1: axes=(X Y Z)
        BodyScale torso: axes=(X Y Z)
      Measurement arm: apply=true
        MarkerPair: markers=(left_shoulder left_elbow)
        MarkerPair: markers=(right_shoulder right_elbow)
        BodyScale humerus_r: axes=(X Y Z)
        BodyScale humerus_l: axes=(X Y Z)
      Measurement forearm: apply=true
        MarkerPair: markers=(left_elbow left_wrist)
        MarkerPair: markers=(right_elbow right_wrist)
        BodyScale ulna_r: axes=(X Y Z)
        BodyScale radius_r: axes=(X Y Z)
        BodyScale hand_r: axes=(X Y Z)
        BodyScale ulna_l: axes=(X Y Z)
        BodyScale radius_l: axes=(X Y Z)
        BodyScale hand_l: axes=(X Y Z)
      Measurement thigh: apply=true
        MarkerPair: markers=(left_hip left_knee)
        MarkerPair: markers=(right_hip right_knee)
        BodyScale femur_r: axes=(X Y Z)
        BodyScale patella_r: axes=(X Y Z)
        BodyScale femur_l: axes=(X Y Z)
        BodyScale patella_l: axes=(X Y Z)
      Measurement shank: apply=true
        MarkerPair: markers=(left_knee left_ankle)
        MarkerPair: markers=(right_knee right_ankle)
        BodyScale tibia_r: axes=(X Y Z)
        BodyScale tibia_l: axes=(X Y Z)
      Measurement foot: apply=true
        MarkerPair: markers=(left_heel left_foot_index)
        MarkerPair: markers=(right_heel right_foot_index)
        BodyScale talus_r: axes=(X Y Z)
        BodyScale calcn_r: axes=(X Y Z)
        BodyScale toes_r: axes=(X Y Z)
        BodyScale talus_l: axes=(X Y Z)
        BodyScale calcn_l: axes=(X Y Z)
        BodyScale toes_l: axes=(X Y Z)
      Measurement head: apply=true
        MarkerPair: markers=(right_eye left_eye)
        MarkerPair: markers=(right_eye nose)
        MarkerPair: markers=(left_eye nose)
        BodyScale head: axes=(X Y Z)
      Measurement pelvis: apply=true
        MarkerPair: markers=(right_hip left_hip)
        BodyScale pelvis: axes=(X Y Z)
        BodyScale sacrum: axes=(X Y Z)
  MarkerPlacer:
    apply: true
    marker_file: C:\Users\Mac Prible\repos\FMC_projects\tests\input\trc\dao_yin.trc
    time_range: 0.7 0.816667
    output_model_file: c:\Users\Mac Prible\repos\FMC_projects\tests\output\test_scale_model_output.osim
    max_marker_movement: -1
    IKTaskSet:
      IKMarkerTask right_hip: apply=true weight=1
      IKMarkerTask right_knee: apply=true weight=1
      IKMarkerTask right_ankle: apply=true weight=1
      IKMarkerTask right_heel: apply=true weight=1
      IKMarkerTask right_foot_index: apply=true weight=1
      IKMarkerTask left_hip: apply=true weight=1
      IKMarkerTask left_knee: apply=true weight=1
      IKMarkerTask left_ankle: apply=true weight=1
      IKMarkerTask left_heel: apply=true weight=1
      IKMarkerTask left_foot_index: apply=true weight=1
      IKMarkerTask left_eye: apply=true weight=1
      IKMarkerTask nose: apply=true weight=1
      IKMarkerTask right_eye: apply=true weight=1
      IKMarkerTask right_shoulder: apply=true weight=1
      IKMarkerTask right_elbow: apply=true weight=1
      IKMarkerTask right_wrist: apply=true weight=1
      IKMarkerTask left_shoulder: apply=true weight=1
      IKMarkerTask left_elbow: apply=true weight=1
      IKMarkerTask left_wrist: apply=true weight=1
