# OpenSim document version 40000
InverseKinematicsTool:
  model_file: C:\Users\Mac Prible\repos\FMC_projects\tests\output\scaled_{self.model_name}_model.osim
  time_range: 0 9
  output_motion_file: C:\Users\Mac Prible\repos\FMC_projects\tests\output\dao_yin_short.mot
  marker_file: C:\Users\Mac Prible\repos\FMC_projects\tests\input\trc\dao_yin_short.trc
  IKTaskSet:
    IKMarkerTask nose: apply=true weight=1
    IKMarkerTask right_eye: apply=true weight=1
    IKMarkerTask left_eye: apply=true weight=1
    IKMarkerTask right_shoulder: apply=true weight=5
    IKMarkerTask left_shoulder: apply=true weight=5
    IKMarkerTask left_elbow: apply=true weight=1
    IKMarkerTask right_elbow: apply=true weight=1
    IKMarkerTask left_wrist: apply=true weight=1
    IKMarkerTask right_wrist: apply=true weight=1
    IKMarkerTask right_hip: apply=true weight=5
    IKMarkerTask left_hip: apply=true weight=5
    IKMarkerTask right_knee: apply=true weight=1
    IKMarkerTask left_knee: apply=true weight=1
    IKMarkerTask right_ankle: apply=true weight=1
    IKMarkerTask right_heel: apply=true weight=1
    IKMarkerTask right_foot_index: apply=true weight=1
    IKMarkerTask left_ankle: apply=true weight=1
    IKMarkerTask left_heel: apply=true weight=1
    IKMarkerTask left_foot_index: apply=true weight=1
